# given: U_B := 12V, I_C := 0.0033A, β_DC := 210 @ 5mA, U_BE := 0.6V, f := 14000000HzU_T := 0.028V @ 5mA, R_L := 1500Ohm, f_T := 300000000Hz
# 1.) Calculate Bias Voltages:
U_RC := 0.413*U_B = 4.956  # V
U_RE := 0.1*U_B = 1.2  # V
U_CE := U_B - U_RE - U_RC = 5.844  # V
# 2.) Calculate R_E:
R_E := U_RE/I_C = 363.636  # Ohm = 360Ohm
# 3.) Calculate I_B & I_q:
I_B := I_C/β_DC = 1.57143e-5  # A = 15.7uA
I_q := 10*I_B = 0.000157143  # A = 157uA
# 4.) Calculate Bias Resistors:
R_1 := (U_B - U_RE - U_BE)/(I_q + I_B) = 59008.3  # Ohm = 62k
R_2 := (U_RE + U_BE)/I_q = 11454.5  # Ohm = 12k
# 5.) Calculate Z_IN:
R_E1 := 300  # Ohm
R_E2 := 100  # Ohm  # variable --> 56...1056Ohm
r_E := U_T/I_C = 8.48485  # Ohm
β_AC := f_T/f = 21.4286
R_EV := R_E1*R_E2/(R_E1 + R_E2)
Z_IN := 1/(1/R_1 + 1/R_2 + 1/(β_AC*(r_E + R_EV))) = 1507.77  # Ohm  # Z_IN = 1061...3300Ohm
# Z_IN = 1.5k @ R_E2 = 100Ohm --> V_U = 9 (Simulation) --> perfect conditions
# R_E1 and R_E2 are calculated in 9.).
clear(R_E1, R_E2, R_EV)
# 6.) Calculate Input Transformer:
Z_P := 50  # Ohm
Z_S := Z_IN = 1507.77  # Ohm
# --> Guideline: 4T:22T @ FT37-43 Toroid Core
# --> L_P := 5.6*10^-6 H @ FT37-43 Toroid Core
# --> L_S := 169.4*10^-6 H @ FT37-43 Toroid Core
ü := sqrt(Z_S/Z_P) = 5.49139
ü_dB := 10*log(ü) = 7.39682  # dB  # --> 7.397dB gain!
Z_S := Z_P*(22/4)^2 = 1512.5  # Ohm
# Requirement:
X_LP := 2*π*f*L_P = 492.602  # Ohm > 9*Z_P = 450 Ohm --> correct!
X_LS := 2*π*f*L_S = 14901.2  # Ohm > 9*Z_IN = 13569.9Ohm --> correct!
# 7.) Calculate Z_OUT:
R_C := U_RC/I_C = 1501.82  # Ohm
# 8.) Calculate Output Transformer:
# No Transformer needed --> input impedance of SA612 equals 1.5k
# 9.) Calculate V_U & R_EV:
# Split up R_E in two parallel resistors R_E1 & R_E2 --> precise V_U
R_EV == R_E1*R_E2/(R_E1 + R_E2)
# V_U := 10:
V_U == R_C/R_EV solve, R_EV → 150.181818182  # Ohm = 150Ohm
# V_U := 5:
V_U == R_C/R_EV solve, R_EV → 300.363636364  # Ohm = 300Ohm
# Simulation: R_E1 == 300Ohm --> I_C = 3.3mA, R_E2= 56...1056Ohm -->V_U = 13...3 @ R_L
# 10.) Calculate Lower Cut-Off Frequency:
C_IN := 0.0000001  # F = 100nF
C_OUT := C_IN
C_E := C_IN*10
R_E1 := 200
r_BE := U_T/I_B = 1781.82  # Ohm
f_GLI := 1/(2*π*(Z_P*r_BE)*C_IN) = 17.8643  # Hz ... Input Cut Off Frequency
f_GLO := 1/(2*π*(R_C + R_L)*C_OUT) = 530.195  # Hz ... Output Cut Off Frequency
f_GLE := 1/(2*π*(Z_P + r_BE + R_E1*(β_DC + 1))*C_E) = 3.61454  # Hz
# ... Emitter Cut Off Frequency
# The lowest cut off frequency determines the lower cut off frequency of the amplifier!
