# 1.) Calculate source and load resistance for two crystals (test circuit):
C_1 := 0.0000000001  # F = 100pF
f := 9000000  # Hz = 9MHz
R := 0.613/(2*π*f*C_1) = 108.402  # Ohm
# 2.) Set up test circuit and measure the bandwidth:
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BW_1 := 1030  # Hz
# ... measured bandwidth
# 3.) Calculate C2 with required bandwidth
BW_2 := 2700  # Hz = 2.7kHz  # ... required bandwidth
C_2 := C_1*(BW_1/BW_2)^2 = 1.45528e-11  # F = 14.6pF
# 4.) Calculate final source and load resistance
R := 0.613/(2*π*f*C_2) = 744.888  # Ohm  # --> Transformer needed!
# 5.) Calculate transformer:
Z_P := 1500  # Ohm
Z_S := R = 744.888  # Ohm
# --> Guideline: 4T:22T @ FT37-43 Toroid Core
# --> L_P := 5.6*10^-6 H @ FT37-43 Toroid Core
# --> L_S := 169.4*10^-6 H @ FT37-43 Toroid Core
ü := sqrt(Z_P/Z_S) = 1.41906
ü_dB := 10*log(ü) = 1.52  # dB  # --> 1.52dB loss!
Z_S := Z_P*(22/4)^2 = 45375  # Ohm
# Requirement:
X_LP := 2*π*f*L_P = 316.673  # Ohm > 9*Z_P = 13500 Ohm --> correct!
X_LS := 2*π*f*L_S = 9579.34  # Ohm > 9*Z_IN =Ohm --> correct!
# 6.) Calculate capacitors for final ladder topology:
# Ladder topology b) is used here:
C(K) := K/(2*π*f*R)
C_S1 := C(0.827) = 1.96332e-11  # F = 19.6pF = 20pF
C_1 := C(0.712) = 1.69031e-11  # F = 16.9pF = 2x 33pF in series = 16.5pF
C_2 := C(0.827) = 1.96332e-11  # F = 19.6pF = 20pF
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# Formulas: http://www.i1wqrlinkradio.com/antype/ch97/chiave40.htm
