# Gain:
Z_15 := 15000  # ... internal resistor between Pin 1 and Pin 5
Z_18 := 1350  # ... internal resistor between Pin 1 and Pin 8
R_G := 150  # ... external gain resistor in series with 10uF cap. (150+10k Poti)
Z_G := 1350*R_G/(1350 + R_G) = 135  # Ohm
G := 2*Z_15/(150 + Z_G) = 105.263
G_dB := 20*log(G) = 40.4455  # dB
# Active Filters:
# Can be found in Excel Calculations!
# Lower Cut Off Frequency is around 300Hz.
# Upper Cut Off Frequency is around 3kHz.
