# given: U_B := 12V, U_BE := 0.6V, U_T := 0.03V, β_DC := 200, R_L := 180Ohm, I_C := 0.035A;
# 1.) Calculate Bias Voltages:
U_RE := 0.5*U_B = 6  # V
U_CE := 0.5*U_B = 6  # V
# 2.) Calculate R_E:
R_E := U_RE/I_C = 171.429  # Ohm ~R_E := 165 --> 330R // 330R
I_C := U_RE/R_E
# 3.) Calculate I_B & I_q:
I_B := I_C/β_DC = 0.000181818  # A = 182uA
I_q := 10*I_B = 0.00181818  # A = 1.82mA
# 4.) Calculate Bias Resistors:
R_1 := (U_B - U_RE - U_BE)/(I_q + I_B) = 2700  # Ohm = 2.7k
R_2 := (U_RE + U_BE)/I_q = 3630  # Ohm = 3.9k
# 5.) Calculate Z_IN:
r_BE := U_T/I_B = 165  # Ohm
Z_IN := 1/(1/R_1 + 1/R_2 + 1/(r_BE + β_DC*(R_E*R_L/(R_E + R_L)))) = 1421.7  # Ohm
# 6.) Calculate u_a:
u_a := I_C*(R_E*R_L/(R_E + R_L)) = 3.13043  # Vp ~ 6.2Vpp
# 7.) Calculate V_U:
V_U < 1
