# geg.: U_B := 12V, P_O2 := 1.2W, η := 0.3, U_T := 0.026V, f := 14000000Hz, R_L := 50Ohm
# 1.) Calculate Stage 2:
# a) Calculate Voltages:
U_RE2 := 0.1*U_B = 1.2  # V
U_BE2 := 0.7  # V
# b) Calculate bias currents:
β_DC2 := 180
I_C2 := P_O2/η*1/U_B = 0.333333  # A
I_B2 := I_C2/β_DC2 = 0.00185185  # A
I_Q2 := 5*I_B2 = 0.00925926  # A
# c) Calculate resistors:
R_C2 := (U_B - U_RE2)^2/(2*P_O2) = 48.6  # Ohm
R_E2 := U_RE2/I_C2 = 3.6  # Ohm
R_E2 := 3.3  # Ohm
R_12 := (U_B - U_BE2 - U_RE2)/(I_B2 + I_Q2) = 909  # Ohm
R_12 := 1000  # Ohm
R_22 := (U_BE2 + U_RE2)/I_Q2 = 205.2  # Ohm
R_22 := 220  # Ohm
# d) Calculate gain resistor:
G_dB2 := 12  # = 15.85
R_E2' := R_C2/10^(G_dB2/10) = 3.06645  # Ohm
R_Ex2 := 1/(1/R_E2' - 1/R_E2) = 43.3287
R_Ex2 := 43  # Ohm
# e) Calculate input resistance:
f_T2 := 200000000  # Hz
β_AC2 := f_T2/f = 14.2857
r_e2 := U_T/I_C2 = 0.078  # Ohm
R_IN2 := 1/(1/R_12 + 1/R_22 + 1/(β_AC2*(r_e2 + R_E2'))) = 35.9623  # Ohm
# 2.) Calculate Stage 1:
# a) Calculate Voltages:
U_RE1 := 0.1*U_B = 1.2  # V
U_BE1 := 0.7  # V
# b) Calculate bias currents:
β_DC1 := 210
P_O1 := P_O2/10^(G_dB2/10) = 0.0757149  # W
I_C1 := P_O1/η*1/U_B = 0.0210319  # A
I_B1 := I_C1/β_DC1 = 0.000100152  # A
I_Q1 := 6*I_B1 = 0.000600912  # A
# c) Calculate resistors:
R_C1 := (U_B - U_RE1)^2/(2*P_O1) = 770.258  # Ohm
R_E1 := U_RE1/I_C1 = 57.0562  # Ohm
R_E1 := 56  # Ohm
R_11 := (U_B - U_BE1 - U_RE1)/(I_B1 + I_Q1) = 14406.7  # Ohm
R_11 := 15000  # Ohm
R_21 := (U_BE1 + U_RE1)/I_Q1 = 3161.86  # Ohm
R_21 := 3300  # Ohm
# d) Calculate gain resistor:
G_dB1 := 20  # = 100
R_E1' := R_C1/10^(G_dB1/10) = 7.70258  # Ohm
R_Ex1 := 1/(1/R_E1' - 1/R_E1) = 8.93101
R_Ex1 := 8.5  # Ohm
# e) Calculate input resistance:
f_T1 := 300000000  # Hz
β_AC1 := f_T1/f = 21.4286
r_e1 := U_T/I_C1 = 1.23622  # Ohm
R_IN1 := 1/(1/R_11 + 1/R_21 + 1/(β_AC1*(r_e1 + R_E1'))) = 178.879  # Ohm
# 3.) Calculate Transformer:
# a) Stage 1 output transformer:
Z_P := R_C1 = 770.258  # Ohm
Z_S := R_IN2 = 35.9623  # Ohm
# --> Guideline: 6T:28T @ FT37-43 Toroid Core
# --> L_P := 113.4*10^-6 H @ FT37-43 Toroid Core
# --> L_S := 5.6*10^-6 H @ FT37-43 Toroid Core
ü_1 := sqrt(Z_P/Z_S) = 4.62801
ü_dB1 := 10*log(ü_1) = 6.65394  # dB  # --> 6.654dB loss!
Z_P := Z_S*(18/4)^2 = 728.237  # Ohm
# Requirement:
X_LP := 2*π*f*L_P = 9975.18  # Ohm > 10*R_C1 = 7702.58 Ohm --> correct!
X_LS := 2*π*f*L_S = 492.602  # Ohm > 10*R_IN2 = 359.623Ohm --> correct!
# b) Stage 2 output transformer:
Z_P := R_C2 = 48.6  # Ohm
Z_S := R_L = 50  # Ohm
# --> Guideline: 6T:28T @ FT37-43 Toroid Core
# --> L_P := 8.75*10^-6 H @ FT37-43 Toroid Core
# --> L_S := 8.75*10^-6 H @ FT37-43 Toroid Core
ü_2 := sqrt(Z_P/Z_S) = 0.985901
ü_dB2 := 10*log(ü_2) = -0.0616687  # dB  # --> 0.062dB gain!
Z_P := Z_S*(5/5)^2 = 50  # Ohm
# Requirement:
X_LP := 2*π*f*L_P = 769.69  # Ohm > 10*R_C2 = 486 Ohm --> correct!
X_LS := 2*π*f*L_S = 769.69  # Ohm > 10*R_L = 500Ohm --> correct!
# 4.) Gain of Driver Amplifier:
G_ges := G_dB1 - ü_dB1 + G_dB2 - ü_dB2 = 25.4077
