# geg.: U_B := 12V, U_LED := 2V, U_BE := 0.7V, I_Bias := 0.01A, I_LED := 0.01A
# Bias Current:
R_LED := (U_B - U_LED)/I_LED = 1000  # Ohm
R_E := (U_LED - U_BE)/I_Bias = 130  # Ohm
R_E := 120  # Ohm
R_C := 51  # Ohm  # --> simulated! U_C := 0.5V
